variable        NSTEPS          equal 400
variable        THERMO_FREQ     equal 5
variable        DUMP_FREQ       equal 5
variable        restart         equal 0
variable        TEMP            equal 500.000000
variable        PRESS           equal 100.000000
variable        TAU_T           equal 0.100000
variable        TAU_P           equal 0.500000

# in0
# this a commit testline
#
#
#

units           metal
boundary        p p p
atom_style      atomic

neighbor        1.0 bin
neigh_modify    delay 10

box              tilt large
if "${restart} > 0" then "read_restart lmps.restart.*" else "read_data lmp.config"
change_box       all triclinic

mass   1    28.086
pair_style   matpl  0_torch_script_module.pt 1_torch_script_module.pt 2_torch_script_module.pt 3_torch_script_module.pt  out_freq ${DUMP_FREQ} out_file model_devi.out
pair_coeff       * * 14

thermo_style    custom step temp pe ke etotal press vol lx ly lz xy xz yz
thermo          ${THERMO_FREQ}
dump            1 all custom ${DUMP_FREQ} traj/*.lammpstrj id type x y z fx fy fz
restart         10000 lmps.restart

if "${restart} == 0" then "velocity        all create ${TEMP} 76752"
fix             1 all npt temp ${TEMP} ${TEMP} ${TAU_T} iso ${PRESS} ${PRESS} ${TAU_P}

timestep        0.001000
run             ${NSTEPS} upto
